OpenVSP model (file version 5), 3 components.
Geometry view with OpenVSP parameter names; values to 6 digits, angles in degrees, lengths in the model's unit.
Overall bounding box: X_Min=-0.00159142 X_Len=5.70159 Y_Min=-16.4747 Y_Len=32.9493 Z_Min=-0.7 Z_Len=2.4

Wing "Main Wing"
  location (X Y Z) 0 0 0, rotation 0 3 0
  symmetric about XZ
  bounding box size 1.34438 32.9493 0.946651
  totals: TotalSpan=33 TotalProjectedSpan=32.9493 TotalChord=1.0425 TotalArea=35.175 TotalAR=30.8644 MAC=1.12354
  root: chord 1.3, twist 0, airfoil file "FX 76-MP-140"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 BaseThickChord=0.140926 ThickChord=0.140926
  sections:
    n  Span  Root_Chord  Tip_Chord  Area    Sweep  Sweep_Location  Dihedral  Twist  Twist_Location  tip airfoil
    1  4.5   1.3         1.3        5.85    0      0               1         0      0.25            as above
    2  3     1.3         1.175      3.7125  0      0               2         0      0.25            as above
    3  3     1.175       1.04       3.3225  0.76   0               3         0      0.25            as above
    4  3     1.04        0.83       2.805   0.95   0               4         0      0.25            as above
    5  3     0.83        0.435      1.8975  1.91   0               5         0      0.25            airfoil file "CLARK-Y 11.7% smoothed"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 BaseThickChord=0.117326 ThickChord=0.117326

Wing "Elevator"
  location (X Y Z) 4 0 0, rotation 0 0 0
  symmetric about XZ
  bounding box size 0.8 3 0.0720447
  totals: TotalSpan=3 TotalProjectedSpan=3 TotalChord=0.8 TotalArea=2.4 TotalAR=3.75 MAC=0.8
  root: chord 0.8, twist 0, NACA 4-series Camber=0 CamberLoc=0.2 ThickChord=0.09
  sections:
    n  Span  Root_Chord  Tip_Chord  Area  Sweep  Sweep_Location  Dihedral  Twist  Twist_Location  tip airfoil
    1  1.5   0.8         0.8        1.2   0      0               0         0      0.25            as above

Wing "Fin"
  location (X Y Z) 5 0 -0.7, rotation 90 0 0
  bounding box size 0.7 0.0630391 2.4
  totals: TotalSpan=2.4 TotalProjectedSpan=2.4 TotalChord=0.7 TotalArea=1.68 TotalAR=3.42857 MAC=0.7
  root: chord 0.7, twist 0, NACA 4-series Camber=0 CamberLoc=0.2 ThickChord=0.09
  sections:
    n  Span  Root_Chord  Tip_Chord  Area  Sweep  Sweep_Location  Dihedral  Twist  Twist_Location  tip airfoil
    1  2.4   0.7         0.7        1.68  0      0               0         0      0.25            as above

VSPAERO settings (reference component "Main Wing"): Sref=35.175 bref=33 cref=1.0425 Xcg=0 Ycg=0 Zcg=0 AlphaStart=0 AlphaEnd=0 AlphaNpts=1 BetaStart=0 BetaEnd=0 BetaNpts=1 MachStart=0 MachEnd=0 MachNpts=1 ReCref=410000 Vinf=6.5 Rho=1.225
