OpenVSP model (file version 5), 1 components.
Geometry view with OpenVSP parameter names; values to 6 digits, angles in degrees, lengths in the model's unit.
Overall bounding box: X_Min=4 X_Len=0.8 Y_Min=-1.5 Y_Len=3 Z_Min=-0.0360223 Z_Len=0.0720447

Wing "Elevator"
  location (X Y Z) 4 0 0, rotation 0 0 0
  symmetric about XZ
  bounding box size 0.8 3 0.0720447
  totals: TotalSpan=3 TotalProjectedSpan=3 TotalChord=0.8 TotalArea=2.4 TotalAR=3.75 MAC=0.8
  root: chord 0.8, twist 0, NACA 4-series Camber=0 CamberLoc=0.2 ThickChord=0.09
  sections:
    n  Span  Root_Chord  Tip_Chord  Area  Sweep  Sweep_Location  Dihedral  Twist  Twist_Location  tip airfoil
    1  1.5   0.8         0.8        1.2   0      0               0         0      0.25            as above

VSPAERO settings: Sref=35.175 bref=33 cref=1.0425 Xcg=0 Ycg=0 Zcg=0 AlphaStart=0 AlphaEnd=0 AlphaNpts=1 BetaStart=0 BetaEnd=0 BetaNpts=1 MachStart=0 MachEnd=0 MachNpts=1 ReCref=410000 Vinf=6.5 Rho=1.225
