** Phase 14 beam deck: current_avl_compromise_conservative_closed_lf1.75
*NODE
1, 0.314193274, 8.5772818e-23, 0.0714391296
2, 0.313078215, 0.14547427, 0.0753224827
3, 0.311963156, 0.29094854, 0.0792058358
4, 0.310841182, 0.436425536, 0.0831099597
5, 0.309719207, 0.581902533, 0.0870140837
6, 0.308594824, 0.72738272, 0.0909187029
7, 0.307470441, 0.872862908, 0.0948233222
8, 0.30636555, 1.01834712, 0.0986967023
9, 0.305260659, 1.16383133, 0.102570082
10, 0.30424296, 1.30932098, 0.106369566
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*ELEMENT, TYPE=B32R, ELSET=MAIN_E1
1, 1, 2, 3
*ELEMENT, TYPE=B32R, ELSET=MAIN_E2
2, 3, 4, 5
*ELEMENT, TYPE=B32R, ELSET=MAIN_E3
3, 5, 6, 7
*ELEMENT, TYPE=B32R, ELSET=MAIN_E4
4, 7, 8, 9
*ELEMENT, TYPE=B32R, ELSET=MAIN_E5
5, 9, 10, 11
*ELEMENT, TYPE=B32R, ELSET=MAIN_E6
6, 11, 12, 13
*ELEMENT, TYPE=B32R, ELSET=MAIN_E7
7, 13, 14, 15
*ELEMENT, TYPE=B32R, ELSET=MAIN_E8
8, 15, 16, 17
*ELEMENT, TYPE=B32R, ELSET=MAIN_E9
9, 17, 18, 19
*ELEMENT, TYPE=B32R, ELSET=MAIN_E10
10, 19, 20, 21
*ELEMENT, TYPE=B32R, ELSET=MAIN_E11
11, 21, 22, 23
*ELEMENT, TYPE=B32R, ELSET=MAIN_E12
12, 23, 24, 25
*ELEMENT, TYPE=B32R, ELSET=MAIN_E13
13, 25, 26, 27
*ELEMENT, TYPE=B32R, ELSET=MAIN_E14
14, 27, 28, 29
*ELEMENT, TYPE=B32R, ELSET=MAIN_E15
15, 29, 30, 31
*ELEMENT, TYPE=B32R, ELSET=MAIN_E16
16, 31, 32, 33
*ELEMENT, TYPE=B32R, ELSET=MAIN_E17
17, 33, 34, 35
*ELEMENT, TYPE=B32R, ELSET=MAIN_E18
18, 35, 36, 37
*ELEMENT, TYPE=B32R, ELSET=MAIN_E19
19, 37, 38, 39
*ELEMENT, TYPE=B32R, ELSET=MAIN_E20
20, 39, 40, 41
*ELEMENT, TYPE=B32R, ELSET=MAIN_E21
21, 41, 42, 43
*ELEMENT, TYPE=B32R, ELSET=MAIN_E22
22, 43, 44, 45
*ELEMENT, TYPE=B32R, ELSET=MAIN_E23
23, 45, 46, 47
*ELEMENT, TYPE=B32R, ELSET=MAIN_E24
24, 47, 48, 49
*ELEMENT, TYPE=B32R, ELSET=MAIN_E25
25, 49, 50, 51
*ELEMENT, TYPE=B32R, ELSET=MAIN_E26
26, 51, 52, 53
*ELEMENT, TYPE=B32R, ELSET=MAIN_E27
27, 53, 54, 55
*ELEMENT, TYPE=B32R, ELSET=MAIN_E28
28, 55, 56, 57
*ELEMENT, TYPE=B32R, ELSET=MAIN_E29
29, 57, 58, 59
*ELEMENT, TYPE=B32R, ELSET=MAIN_E30
30, 59, 60, 61
*ELEMENT, TYPE=B32R, ELSET=MAIN_E31
31, 61, 62, 63
*ELEMENT, TYPE=B32R, ELSET=MAIN_E32
32, 63, 64, 65
*ELEMENT, TYPE=B32R, ELSET=MAIN_E33
33, 65, 66, 67
*ELEMENT, TYPE=B32R, ELSET=MAIN_E34
34, 67, 68, 69
*ELEMENT, TYPE=B32R, ELSET=MAIN_E35
35, 69, 70, 71
*ELEMENT, TYPE=B32R, ELSET=MAIN_E36
36, 71, 72, 73
*ELEMENT, TYPE=B32R, ELSET=MAIN_E37
37, 73, 74, 75
*ELEMENT, TYPE=B32R, ELSET=MAIN_E38
38, 75, 76, 77
*ELEMENT, TYPE=B32R, ELSET=MAIN_E39
39, 77, 78, 79
*ELEMENT, TYPE=B32R, ELSET=MAIN_E40
40, 79, 80, 81
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*NSET, NSET=ROOT_MAIN
1
*NSET, NSET=TIP_MAIN
119
*NSET, NSET=ROOT_REAR
120
*NSET, NSET=TIP_REAR
238
*NSET, NSET=WIRE_MAIN
53
*NSET, NSET=WIRE_REAR_LINK
172
*NSET, NSET=HPA_SUPPORT_ROOT
1, 120
*NSET, NSET=HPA_SUPPORT_WIRE
53, 172
*NSET, NSET=HPA_SUPPORT_ALL
1, 53, 120, 172
*MATERIAL, NAME=CARBON_FIBER_HM_MAIN
*ELASTIC
2.3e+11, 0.27
*DENSITY
1600
*MATERIAL, NAME=CARBON_FIBER_HM_REAR
*ELASTIC
2.3e+11, 0.27
*DENSITY
1600
*BEAM SECTION,ELSET=MAIN_E1,MATERIAL=CARBON_FIBER_HM_MAIN,SECTION=PIPE
0.0349239, 0.0008
1.0, 0.0, 0.0
*BEAM SECTION,ELSET=MAIN_E2,MATERIAL=CARBON_FIBER_HM_MAIN,SECTION=PIPE
0.0349239, 0.0008
1.0, 0.0, 0.0
*BEAM SECTION,ELSET=MAIN_E3,MATERIAL=CARBON_FIBER_HM_MAIN,SECTION=PIPE
0.0349239, 0.0008
1.0, 0.0, 0.0
*BEAM SECTION,ELSET=MAIN_E4,MATERIAL=CARBON_FIBER_HM_MAIN,SECTION=PIPE
0.0349239, 0.0008
1.0, 0.0, 0.0
*BEAM SECTION,ELSET=MAIN_E5,MATERIAL=CARBON_FIBER_HM_MAIN,SECTION=PIPE
0.0349239, 0.0008
1.0, 0.0, 0.0
*BEAM SECTION,ELSET=MAIN_E6,MATERIAL=CARBON_FIBER_HM_MAIN,SECTION=PIPE
0.0349239, 0.0008
1.0, 0.0, 0.0
*BEAM SECTION,ELSET=MAIN_E7,MATERIAL=CARBON_FIBER_HM_MAIN,SECTION=PIPE
0.0349239, 0.0008
1.0, 0.0, 0.0
*BEAM SECTION,ELSET=MAIN_E8,MATERIAL=CARBON_FIBER_HM_MAIN,SECTION=PIPE
0.0349239, 0.0008
1.0, 0.0, 0.0
*BEAM SECTION,ELSET=MAIN_E9,MATERIAL=CARBON_FIBER_HM_MAIN,SECTION=PIPE
0.0349239, 0.0008
1.0, 0.0, 0.0
*BEAM SECTION,ELSET=MAIN_E10,MATERIAL=CARBON_FIBER_HM_MAIN,SECTION=PIPE
0.0349239, 0.0008
1.0, 0.0, 0.0
*BEAM SECTION,ELSET=MAIN_E11,MATERIAL=CARBON_FIBER_HM_MAIN,SECTION=PIPE
0.0349239, 0.0008
1.0, 0.0, 0.0
*BEAM SECTION,ELSET=MAIN_E12,MATERIAL=CARBON_FIBER_HM_MAIN,SECTION=PIPE
0.0349239, 0.0008
1.0, 0.0, 0.0
*BEAM SECTION,ELSET=MAIN_E13,MATERIAL=CARBON_FIBER_HM_MAIN,SECTION=PIPE
0.0349239, 0.0008
1.0, 0.0, 0.0
*BEAM SECTION,ELSET=MAIN_E14,MATERIAL=CARBON_FIBER_HM_MAIN,SECTION=PIPE
0.0349239, 0.0008
1.0, 0.0, 0.0
*BEAM SECTION,ELSET=MAIN_E15,MATERIAL=CARBON_FIBER_HM_MAIN,SECTION=PIPE
0.0349239, 0.0008
1.0, 0.0, 0.0
*BEAM SECTION,ELSET=MAIN_E16,MATERIAL=CARBON_FIBER_HM_MAIN,SECTION=PIPE
0.0349239, 0.0008
1.0, 0.0, 0.0
*BEAM SECTION,ELSET=MAIN_E17,MATERIAL=CARBON_FIBER_HM_MAIN,SECTION=PIPE
0.0349239, 0.0008
1.0, 0.0, 0.0
*BEAM SECTION,ELSET=MAIN_E18,MATERIAL=CARBON_FIBER_HM_MAIN,SECTION=PIPE
0.0349239, 0.0008
1.0, 0.0, 0.0
*BEAM SECTION,ELSET=MAIN_E19,MATERIAL=CARBON_FIBER_HM_MAIN,SECTION=PIPE
0.0349239, 0.0008
1.0, 0.0, 0.0
*BEAM SECTION,ELSET=MAIN_E20,MATERIAL=CARBON_FIBER_HM_MAIN,SECTION=PIPE
0.0349239, 0.0008
1.0, 0.0, 0.0
*BEAM SECTION,ELSET=MAIN_E21,MATERIAL=CARBON_FIBER_HM_MAIN,SECTION=PIPE
0.0349239, 0.0008
1.0, 0.0, 0.0
*BEAM SECTION,ELSET=MAIN_E22,MATERIAL=CARBON_FIBER_HM_MAIN,SECTION=PIPE
0.0349239, 0.0008
1.0, 0.0, 0.0
*BEAM SECTION,ELSET=MAIN_E23,MATERIAL=CARBON_FIBER_HM_MAIN,SECTION=PIPE
0.0349239, 0.0008
1.0, 0.0, 0.0
*BEAM SECTION,ELSET=MAIN_E24,MATERIAL=CARBON_FIBER_HM_MAIN,SECTION=PIPE
0.0349239, 0.0008
1.0, 0.0, 0.0
*BEAM SECTION,ELSET=MAIN_E25,MATERIAL=CARBON_FIBER_HM_MAIN,SECTION=PIPE
0.0349239, 0.0008
1.0, 0.0, 0.0
*BEAM SECTION,ELSET=MAIN_E26,MATERIAL=CARBON_FIBER_HM_MAIN,SECTION=PIPE
0.0349239, 0.0008
1.0, 0.0, 0.0
*BEAM SECTION,ELSET=MAIN_E27,MATERIAL=CARBON_FIBER_HM_MAIN,SECTION=PIPE
0.0349239, 0.0008
1.0, 0.0, 0.0
*BEAM SECTION,ELSET=MAIN_E28,MATERIAL=CARBON_FIBER_HM_MAIN,SECTION=PIPE
0.0349239, 0.0008
1.0, 0.0, 0.0
*BEAM SECTION,ELSET=MAIN_E29,MATERIAL=CARBON_FIBER_HM_MAIN,SECTION=PIPE
0.0349239, 0.0008
1.0, 0.0, 0.0
*BEAM SECTION,ELSET=MAIN_E30,MATERIAL=CARBON_FIBER_HM_MAIN,SECTION=PIPE
0.0349239, 0.0008
1.0, 0.0, 0.0
*BEAM SECTION,ELSET=MAIN_E31,MATERIAL=CARBON_FIBER_HM_MAIN,SECTION=PIPE
0.0349239, 0.0008
1.0, 0.0, 0.0
*BEAM SECTION,ELSET=MAIN_E32,MATERIAL=CARBON_FIBER_HM_MAIN,SECTION=PIPE
0.0349239, 0.0008
1.0, 0.0, 0.0
*BEAM SECTION,ELSET=MAIN_E33,MATERIAL=CARBON_FIBER_HM_MAIN,SECTION=PIPE
0.0349239, 0.0008
1.0, 0.0, 0.0
*BEAM SECTION,ELSET=MAIN_E34,MATERIAL=CARBON_FIBER_HM_MAIN,SECTION=PIPE
0.0349239, 0.0008
1.0, 0.0, 0.0
*BEAM SECTION,ELSET=MAIN_E35,MATERIAL=CARBON_FIBER_HM_MAIN,SECTION=PIPE
0.0349239, 0.0008
1.0, 0.0, 0.0
*BEAM SECTION,ELSET=MAIN_E36,MATERIAL=CARBON_FIBER_HM_MAIN,SECTION=PIPE
0.0349239, 0.0008
1.0, 0.0, 0.0
*BEAM SECTION,ELSET=MAIN_E37,MATERIAL=CARBON_FIBER_HM_MAIN,SECTION=PIPE
0.0310939, 0.0008
1.0, 0.0, 0.0
*BEAM SECTION,ELSET=MAIN_E38,MATERIAL=CARBON_FIBER_HM_MAIN,SECTION=PIPE
0.0272639, 0.0008
1.0, 0.0, 0.0
*BEAM SECTION,ELSET=MAIN_E39,MATERIAL=CARBON_FIBER_HM_MAIN,SECTION=PIPE
0.0272639, 0.0008
1.0, 0.0, 0.0
*BEAM SECTION,ELSET=MAIN_E40,MATERIAL=CARBON_FIBER_HM_MAIN,SECTION=PIPE
0.0272639, 0.0008
1.0, 0.0, 0.0
*BEAM SECTION,ELSET=MAIN_E41,MATERIAL=CARBON_FIBER_HM_MAIN,SECTION=PIPE
0.0272639, 0.0008
1.0, 0.0, 0.0
*BEAM SECTION,ELSET=MAIN_E42,MATERIAL=CARBON_FIBER_HM_MAIN,SECTION=PIPE
0.0272639, 0.0008
1.0, 0.0, 0.0
*BEAM SECTION,ELSET=MAIN_E43,MATERIAL=CARBON_FIBER_HM_MAIN,SECTION=PIPE
0.0272639, 0.0008
1.0, 0.0, 0.0
*BEAM SECTION,ELSET=MAIN_E44,MATERIAL=CARBON_FIBER_HM_MAIN,SECTION=PIPE
0.0272639, 0.0008
1.0, 0.0, 0.0
*BEAM SECTION,ELSET=MAIN_E45,MATERIAL=CARBON_FIBER_HM_MAIN,SECTION=PIPE
0.0272639, 0.0008
1.0, 0.0, 0.0
*BEAM SECTION,ELSET=MAIN_E46,MATERIAL=CARBON_FIBER_HM_MAIN,SECTION=PIPE
0.0272639, 0.0008
1.0, 0.0, 0.0
*BEAM SECTION,ELSET=MAIN_E47,MATERIAL=CARBON_FIBER_HM_MAIN,SECTION=PIPE
0.0232764, 0.0008
1.0, 0.0, 0.0
*BEAM SECTION,ELSET=MAIN_E48,MATERIAL=CARBON_FIBER_HM_MAIN,SECTION=PIPE
0.0192889, 0.0008
1.0, 0.0, 0.0
*BEAM SECTION,ELSET=MAIN_E49,MATERIAL=CARBON_FIBER_HM_MAIN,SECTION=PIPE
0.0192889, 0.0008
1.0, 0.0, 0.0
*BEAM SECTION,ELSET=MAIN_E50,MATERIAL=CARBON_FIBER_HM_MAIN,SECTION=PIPE
0.0192889, 0.0008
1.0, 0.0, 0.0
*BEAM SECTION,ELSET=MAIN_E51,MATERIAL=CARBON_FIBER_HM_MAIN,SECTION=PIPE
0.0192889, 0.0008
1.0, 0.0, 0.0
*BEAM SECTION,ELSET=MAIN_E52,MATERIAL=CARBON_FIBER_HM_MAIN,SECTION=PIPE
0.0192889, 0.0008
1.0, 0.0, 0.0
*BEAM SECTION,ELSET=MAIN_E53,MATERIAL=CARBON_FIBER_HM_MAIN,SECTION=PIPE
0.0192889, 0.0008
1.0, 0.0, 0.0
*BEAM SECTION,ELSET=MAIN_E54,MATERIAL=CARBON_FIBER_HM_MAIN,SECTION=PIPE
0.0192889, 0.0008
1.0, 0.0, 0.0
*BEAM SECTION,ELSET=MAIN_E55,MATERIAL=CARBON_FIBER_HM_MAIN,SECTION=PIPE
0.0192889, 0.0008
1.0, 0.0, 0.0
*BEAM SECTION,ELSET=MAIN_E56,MATERIAL=CARBON_FIBER_HM_MAIN,SECTION=PIPE
0.0192889, 0.0008
1.0, 0.0, 0.0
*BEAM SECTION,ELSET=MAIN_E57,MATERIAL=CARBON_FIBER_HM_MAIN,SECTION=PIPE
0.0192889, 0.0008
1.0, 0.0, 0.0
*BEAM SECTION,ELSET=MAIN_E58,MATERIAL=CARBON_FIBER_HM_MAIN,SECTION=PIPE
0.0192889, 0.0008
1.0, 0.0, 0.0
*BEAM SECTION,ELSET=MAIN_E59,MATERIAL=CARBON_FIBER_HM_MAIN,SECTION=PIPE
0.0192889, 0.0008
1.0, 0.0, 0.0
*BEAM SECTION,ELSET=REAR_E1,MATERIAL=CARBON_FIBER_HM_REAR,SECTION=PIPE
0.01, 0.0008
1.0, 0.0, 0.0
*BEAM SECTION,ELSET=REAR_E2,MATERIAL=CARBON_FIBER_HM_REAR,SECTION=PIPE
0.01, 0.0008
1.0, 0.0, 0.0
*BEAM SECTION,ELSET=REAR_E3,MATERIAL=CARBON_FIBER_HM_REAR,SECTION=PIPE
0.01, 0.0008
1.0, 0.0, 0.0
*BEAM SECTION,ELSET=REAR_E4,MATERIAL=CARBON_FIBER_HM_REAR,SECTION=PIPE
0.01, 0.0008
1.0, 0.0, 0.0
*BEAM SECTION,ELSET=REAR_E5,MATERIAL=CARBON_FIBER_HM_REAR,SECTION=PIPE
0.01, 0.0008
1.0, 0.0, 0.0
*BEAM SECTION,ELSET=REAR_E6,MATERIAL=CARBON_FIBER_HM_REAR,SECTION=PIPE
0.01, 0.0008
1.0, 0.0, 0.0
*BEAM SECTION,ELSET=REAR_E7,MATERIAL=CARBON_FIBER_HM_REAR,SECTION=PIPE
0.01, 0.0008
1.0, 0.0, 0.0
*BEAM SECTION,ELSET=REAR_E8,MATERIAL=CARBON_FIBER_HM_REAR,SECTION=PIPE
0.01, 0.0008
1.0, 0.0, 0.0
*BEAM SECTION,ELSET=REAR_E9,MATERIAL=CARBON_FIBER_HM_REAR,SECTION=PIPE
0.01, 0.0008
1.0, 0.0, 0.0
*BEAM SECTION,ELSET=REAR_E10,MATERIAL=CARBON_FIBER_HM_REAR,SECTION=PIPE
0.01, 0.0008
1.0, 0.0, 0.0
*BEAM SECTION,ELSET=REAR_E11,MATERIAL=CARBON_FIBER_HM_REAR,SECTION=PIPE
0.01, 0.0008
1.0, 0.0, 0.0
*BEAM SECTION,ELSET=REAR_E12,MATERIAL=CARBON_FIBER_HM_REAR,SECTION=PIPE
0.01, 0.0008
1.0, 0.0, 0.0
*BEAM SECTION,ELSET=REAR_E13,MATERIAL=CARBON_FIBER_HM_REAR,SECTION=PIPE
0.01, 0.0008
1.0, 0.0, 0.0
*BEAM SECTION,ELSET=REAR_E14,MATERIAL=CARBON_FIBER_HM_REAR,SECTION=PIPE
0.01, 0.0008
1.0, 0.0, 0.0
*BEAM SECTION,ELSET=REAR_E15,MATERIAL=CARBON_FIBER_HM_REAR,SECTION=PIPE
0.01, 0.0008
1.0, 0.0, 0.0
*BEAM SECTION,ELSET=REAR_E16,MATERIAL=CARBON_FIBER_HM_REAR,SECTION=PIPE
0.01, 0.0008
1.0, 0.0, 0.0
*BEAM SECTION,ELSET=REAR_E17,MATERIAL=CARBON_FIBER_HM_REAR,SECTION=PIPE
0.01, 0.0008
1.0, 0.0, 0.0
*BEAM SECTION,ELSET=REAR_E18,MATERIAL=CARBON_FIBER_HM_REAR,SECTION=PIPE
0.01, 0.0008
1.0, 0.0, 0.0
*BEAM SECTION,ELSET=REAR_E19,MATERIAL=CARBON_FIBER_HM_REAR,SECTION=PIPE
0.01, 0.0008
1.0, 0.0, 0.0
*BEAM SECTION,ELSET=REAR_E20,MATERIAL=CARBON_FIBER_HM_REAR,SECTION=PIPE
0.01, 0.0008
1.0, 0.0, 0.0
*BEAM SECTION,ELSET=REAR_E21,MATERIAL=CARBON_FIBER_HM_REAR,SECTION=PIPE
0.01, 0.0008
1.0, 0.0, 0.0
*BEAM SECTION,ELSET=REAR_E22,MATERIAL=CARBON_FIBER_HM_REAR,SECTION=PIPE
0.01, 0.0008
1.0, 0.0, 0.0
*BEAM SECTION,ELSET=REAR_E23,MATERIAL=CARBON_FIBER_HM_REAR,SECTION=PIPE
0.01, 0.0008
1.0, 0.0, 0.0
*BEAM SECTION,ELSET=REAR_E24,MATERIAL=CARBON_FIBER_HM_REAR,SECTION=PIPE
0.01, 0.0008
1.0, 0.0, 0.0
*BEAM SECTION,ELSET=REAR_E25,MATERIAL=CARBON_FIBER_HM_REAR,SECTION=PIPE
0.01, 0.0008
1.0, 0.0, 0.0
*BEAM SECTION,ELSET=REAR_E26,MATERIAL=CARBON_FIBER_HM_REAR,SECTION=PIPE
0.01, 0.0008
1.0, 0.0, 0.0
*BEAM SECTION,ELSET=REAR_E27,MATERIAL=CARBON_FIBER_HM_REAR,SECTION=PIPE
0.01, 0.0008
1.0, 0.0, 0.0
*BEAM SECTION,ELSET=REAR_E28,MATERIAL=CARBON_FIBER_HM_REAR,SECTION=PIPE
0.01, 0.0008
1.0, 0.0, 0.0
*BEAM SECTION,ELSET=REAR_E29,MATERIAL=CARBON_FIBER_HM_REAR,SECTION=PIPE
0.01, 0.0008
1.0, 0.0, 0.0
*BEAM SECTION,ELSET=REAR_E30,MATERIAL=CARBON_FIBER_HM_REAR,SECTION=PIPE
0.01, 0.0008
1.0, 0.0, 0.0
*BEAM SECTION,ELSET=REAR_E31,MATERIAL=CARBON_FIBER_HM_REAR,SECTION=PIPE
0.01, 0.0008
1.0, 0.0, 0.0
*BEAM SECTION,ELSET=REAR_E32,MATERIAL=CARBON_FIBER_HM_REAR,SECTION=PIPE
0.01, 0.0008
1.0, 0.0, 0.0
*BEAM SECTION,ELSET=REAR_E33,MATERIAL=CARBON_FIBER_HM_REAR,SECTION=PIPE
0.01, 0.0008
1.0, 0.0, 0.0
*BEAM SECTION,ELSET=REAR_E34,MATERIAL=CARBON_FIBER_HM_REAR,SECTION=PIPE
0.01, 0.0008
1.0, 0.0, 0.0
*BEAM SECTION,ELSET=REAR_E35,MATERIAL=CARBON_FIBER_HM_REAR,SECTION=PIPE
0.01, 0.0008
1.0, 0.0, 0.0
*BEAM SECTION,ELSET=REAR_E36,MATERIAL=CARBON_FIBER_HM_REAR,SECTION=PIPE
0.01, 0.0008
1.0, 0.0, 0.0
*BEAM SECTION,ELSET=REAR_E37,MATERIAL=CARBON_FIBER_HM_REAR,SECTION=PIPE
0.01, 0.0008
1.0, 0.0, 0.0
*BEAM SECTION,ELSET=REAR_E38,MATERIAL=CARBON_FIBER_HM_REAR,SECTION=PIPE
0.01, 0.0008
1.0, 0.0, 0.0
*BEAM SECTION,ELSET=REAR_E39,MATERIAL=CARBON_FIBER_HM_REAR,SECTION=PIPE
0.01, 0.0008
1.0, 0.0, 0.0
*BEAM SECTION,ELSET=REAR_E40,MATERIAL=CARBON_FIBER_HM_REAR,SECTION=PIPE
0.01, 0.0008
1.0, 0.0, 0.0
*BEAM SECTION,ELSET=REAR_E41,MATERIAL=CARBON_FIBER_HM_REAR,SECTION=PIPE
0.01, 0.0008
1.0, 0.0, 0.0
*BEAM SECTION,ELSET=REAR_E42,MATERIAL=CARBON_FIBER_HM_REAR,SECTION=PIPE
0.01, 0.0008
1.0, 0.0, 0.0
*BEAM SECTION,ELSET=REAR_E43,MATERIAL=CARBON_FIBER_HM_REAR,SECTION=PIPE
0.01, 0.0008
1.0, 0.0, 0.0
*BEAM SECTION,ELSET=REAR_E44,MATERIAL=CARBON_FIBER_HM_REAR,SECTION=PIPE
0.01, 0.0008
1.0, 0.0, 0.0
*BEAM SECTION,ELSET=REAR_E45,MATERIAL=CARBON_FIBER_HM_REAR,SECTION=PIPE
0.01, 0.0008
1.0, 0.0, 0.0
*BEAM SECTION,ELSET=REAR_E46,MATERIAL=CARBON_FIBER_HM_REAR,SECTION=PIPE
0.01, 0.0008
1.0, 0.0, 0.0
*BEAM SECTION,ELSET=REAR_E47,MATERIAL=CARBON_FIBER_HM_REAR,SECTION=PIPE
0.01, 0.0008
1.0, 0.0, 0.0
*BEAM SECTION,ELSET=REAR_E48,MATERIAL=CARBON_FIBER_HM_REAR,SECTION=PIPE
0.01, 0.0008
1.0, 0.0, 0.0
*BEAM SECTION,ELSET=REAR_E49,MATERIAL=CARBON_FIBER_HM_REAR,SECTION=PIPE
0.01, 0.0008
1.0, 0.0, 0.0
*BEAM SECTION,ELSET=REAR_E50,MATERIAL=CARBON_FIBER_HM_REAR,SECTION=PIPE
0.01, 0.0008
1.0, 0.0, 0.0
*BEAM SECTION,ELSET=REAR_E51,MATERIAL=CARBON_FIBER_HM_REAR,SECTION=PIPE
0.01, 0.0008
1.0, 0.0, 0.0
*BEAM SECTION,ELSET=REAR_E52,MATERIAL=CARBON_FIBER_HM_REAR,SECTION=PIPE
0.01, 0.0008
1.0, 0.0, 0.0
*BEAM SECTION,ELSET=REAR_E53,MATERIAL=CARBON_FIBER_HM_REAR,SECTION=PIPE
0.01, 0.0008
1.0, 0.0, 0.0
*BEAM SECTION,ELSET=REAR_E54,MATERIAL=CARBON_FIBER_HM_REAR,SECTION=PIPE
0.01, 0.0008
1.0, 0.0, 0.0
*BEAM SECTION,ELSET=REAR_E55,MATERIAL=CARBON_FIBER_HM_REAR,SECTION=PIPE
0.01, 0.0008
1.0, 0.0, 0.0
*BEAM SECTION,ELSET=REAR_E56,MATERIAL=CARBON_FIBER_HM_REAR,SECTION=PIPE
0.01, 0.0008
1.0, 0.0, 0.0
*BEAM SECTION,ELSET=REAR_E57,MATERIAL=CARBON_FIBER_HM_REAR,SECTION=PIPE
0.01, 0.0008
1.0, 0.0, 0.0
*BEAM SECTION,ELSET=REAR_E58,MATERIAL=CARBON_FIBER_HM_REAR,SECTION=PIPE
0.01, 0.0008
1.0, 0.0, 0.0
*BEAM SECTION,ELSET=REAR_E59,MATERIAL=CARBON_FIBER_HM_REAR,SECTION=PIPE
0.01, 0.0008
1.0, 0.0, 0.0
*EQUATION
2
11, 1, 1.0, 130, 1, -1.0
*EQUATION
2
11, 2, 1.0, 130, 2, -1.0
*EQUATION
2
11, 3, 1.0, 130, 3, -1.0
*EQUATION
2
11, 4, 1.0, 130, 4, -1.0
*EQUATION
2
11, 5, 1.0, 130, 5, -1.0
*EQUATION
2
11, 6, 1.0, 130, 6, -1.0
*EQUATION
2
31, 1, 1.0, 150, 1, -1.0
*EQUATION
2
31, 2, 1.0, 150, 2, -1.0
*EQUATION
2
31, 3, 1.0, 150, 3, -1.0
*EQUATION
2
31, 4, 1.0, 150, 4, -1.0
*EQUATION
2
31, 5, 1.0, 150, 5, -1.0
*EQUATION
2
31, 6, 1.0, 150, 6, -1.0
*EQUATION
2
53, 1, 1.0, 172, 1, -1.0
*EQUATION
2
53, 2, 1.0, 172, 2, -1.0
*EQUATION
2
172, 3, 1.0, 53, 3, -1.0
*EQUATION
2
53, 4, 1.0, 172, 4, -1.0
*EQUATION
2
53, 5, 1.0, 172, 5, -1.0
*EQUATION
2
53, 6, 1.0, 172, 6, -1.0
*EQUATION
2
73, 1, 1.0, 192, 1, -1.0
*EQUATION
2
73, 2, 1.0, 192, 2, -1.0
*EQUATION
2
73, 3, 1.0, 192, 3, -1.0
*EQUATION
2
73, 4, 1.0, 192, 4, -1.0
*EQUATION
2
73, 5, 1.0, 192, 5, -1.0
*EQUATION
2
73, 6, 1.0, 192, 6, -1.0
*EQUATION
2
93, 1, 1.0, 212, 1, -1.0
*EQUATION
2
93, 2, 1.0, 212, 2, -1.0
*EQUATION
2
93, 3, 1.0, 212, 3, -1.0
*EQUATION
2
93, 4, 1.0, 212, 4, -1.0
*EQUATION
2
93, 5, 1.0, 212, 5, -1.0
*EQUATION
2
93, 6, 1.0, 212, 6, -1.0
*BOUNDARY
1, 1, 6
120, 1, 6
53, 3, 3, 0.0
*STEP
*STATIC
1.0, 1.0
*CLOAD
1, 3, -0.693200921
120, 3, -0.192757158
3, 3, -1.38640184
122, 3, -0.385514315
5, 3, 18.5128644
124, 3, -0.385514315
7, 3, 18.433679
126, 3, -0.385514315
9, 3, 18.3544937
128, 3, -0.385514315
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*NODE PRINT, NSET=HPA_SUPPORT_ALL, TOTALS=ONLY
RF
*NODE PRINT, NSET=HPA_SUPPORT_ROOT, TOTALS=ONLY
RF
*NODE PRINT, NSET=HPA_SUPPORT_WIRE, TOTALS=ONLY
RF
*NODE FILE, OUTPUT=2D
U
*END STEP
