OpenVSP model (file version 5), 1 components.
Geometry view with OpenVSP parameter names; values to 6 digits, angles in degrees, lengths in the model's unit.
Overall bounding box: X_Min=0.00146268 X_Len=1.25099 Y_Min=-17.1288 Y_Len=34.2576 Z_Min=-0.0949329 Z_Len=1.2005

Wing "Phase7SidecarWing"
  location (X Y Z) 0 0 0, rotation 0 0 0
  symmetric about XZ
  bounding box size 1.25099 34.2576 1.2005
  totals: TotalSpan=34.3323 TotalProjectedSpan=34.2576 TotalChord=0.903519 TotalArea=33.4201 TotalAR=35.1162 MAC=1.00371
  root: chord 1.25677, twist 5.63371, airfoil file "cst_root_nsga2_g05_child_0019_00cc4dca"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 BaseThickChord=0.151249 ThickChord=0.151249
  sections:
    n  Span      Root_Chord  Tip_Chord  Area      Sweep  Sweep_Location  Dihedral  Twist    Twist_Location  tip airfoil
    1  2.74658   1.25677     1.17156    3.33482   0      0.25            1.4       5.95942  0.25            as above
    2  3.26157   1.17156     1.06733    3.65115   0      0.25            2.275     6.06243  0.25            airfoil file "cst_mid1_nsga2_g05_child_0114_b5496e0b"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 BaseThickChord=0.139278 ThickChord=0.139278
    3  2.91824   1.06733     0.970372   2.97325   0      0.25            3.175     5.67096  0.25            as above
    4  3.08991   0.970372    0.862164   2.83118   0      0.25            4.05      4.84381  0.25            airfoil file "DAE 31"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 BaseThickChord=0.110365 ThickChord=0.110365
    5  2.05994   0.862164    0.784941   1.69647   0      0.25            4.8       4.24606  0.25            airfoil file "CLARK-Y 11.7% smoothed"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 BaseThickChord=0.117326 ThickChord=0.117326
    6  1.37329   0.784941    0.729402   1.03982   0      0.25            5.3       3.92819  0.25            as above
    7  0.858307  0.729402    0.691495   0.609783  0      0.25            5.625     3.72953  0.25            as above
    8  0.858307  0.691495    0.645004   0.573563  0      0.25            5.875     3.65006  0.25            as above
