Birdman concept wing-only AVL Phase9 smooth monotone
#Mach
0.000000
#IYsym  iZsym  Zsym
1  0  0.000000
#Sref  Cref  Bref
33.420059598  1.003721543  34.332286000
#Xref  Yref  Zref
0.246276512  0.000000000  0.000000000
#CDp
0.000000
#
SURFACE
Wing
16  1.0  32  1.0
#
SECTION
0.000000000  0.000000000  0.000000000  1.256773096  6.624160000
AFILE
/Volumes/Samsung SSD/hpa-mdo/output/final_candidate_validation/tier2_raw_vs_conservative/geometry_exports/production_inspection/raw_best_tier2/airfoils/cst_root_nsga2_g04_child_0066_2124fc90.dat
#
SECTION
0.000000000  2.746583000  0.067125043  1.171564829  6.949866000
AFILE
/Volumes/Samsung SSD/hpa-mdo/output/final_candidate_validation/tier2_raw_vs_conservative/geometry_exports/production_inspection/raw_best_tier2/airfoils/cst_root_nsga2_g04_child_0066_2124fc90.dat
#
SECTION
0.000000000  6.008150000  0.196697708  1.067327906  7.052883000
AFILE
/Volumes/Samsung SSD/hpa-mdo/output/final_candidate_validation/tier2_raw_vs_conservative/geometry_exports/production_inspection/raw_best_tier2/airfoils/dae21.dat
#
SECTION
0.000000000  8.926394000  0.358575604  0.970371624  6.661413000
AFILE
/Volumes/Samsung SSD/hpa-mdo/output/final_candidate_validation/tier2_raw_vs_conservative/geometry_exports/production_inspection/raw_best_tier2/airfoils/dae21.dat
#
SECTION
0.000000000  12.016300000  0.577352682  0.862163835  5.834263000
AFILE
/Volumes/Samsung SSD/hpa-mdo/output/final_candidate_validation/tier2_raw_vs_conservative/geometry_exports/production_inspection/raw_best_tier2/airfoils/cst_mid2_nsga2_g01_child_0046_9585b968.dat
#
SECTION
0.000000000  14.076237000  0.750330425  0.784941307  5.236513000
AFILE
/Volumes/Samsung SSD/hpa-mdo/output/final_candidate_validation/tier2_raw_vs_conservative/geometry_exports/production_inspection/raw_best_tier2/airfoils/cst_tip_nsga2_g04_child_0123_01770232.dat
#
SECTION
0.000000000  15.449529000  0.877726872  0.729402473  4.918643000
AFILE
/Volumes/Samsung SSD/hpa-mdo/output/final_candidate_validation/tier2_raw_vs_conservative/geometry_exports/production_inspection/raw_best_tier2/airfoils/cst_tip_nsga2_g04_child_0123_01770232.dat
#
SECTION
0.000000000  16.307836000  0.962262733  0.691495432  4.719975000
AFILE
/Volumes/Samsung SSD/hpa-mdo/output/final_candidate_validation/tier2_raw_vs_conservative/geometry_exports/production_inspection/raw_best_tier2/airfoils/cst_tip_nsga2_g04_child_0123_01770232.dat
#
SECTION
0.000000000  17.166143000  1.050581644  0.645004090  4.640507000
AFILE
/Volumes/Samsung SSD/hpa-mdo/output/final_candidate_validation/tier2_raw_vs_conservative/geometry_exports/production_inspection/raw_best_tier2/airfoils/cst_tip_nsga2_g04_child_0123_01770232.dat
#
