OpenVSP model (file version 5), 1 components.
Geometry view with OpenVSP parameter names; values to 6 digits, angles in degrees, lengths in the model's unit.
Overall bounding box: X_Min=0.00197018 X_Len=1.24874 Y_Min=-17.1288 Y_Len=34.2576 Z_Min=-0.11069 Z_Len=1.21298

Wing "Phase7SidecarWing"
  location (X Y Z) 0 0 0, rotation 0 0 0
  symmetric about XZ
  bounding box size 1.24874 34.2576 1.21298
  totals: TotalSpan=34.3323 TotalProjectedSpan=34.2576 TotalChord=0.903519 TotalArea=33.4201 TotalAR=35.1162 MAC=1.00369
  root: chord 1.25677, twist 6.62416, airfoil file "cst_root_nsga2_g04_child_0066_2124fc90"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 BaseThickChord=0.154553 ThickChord=0.154553
  sections:
    n  Span      Root_Chord  Tip_Chord  Area      Sweep  Sweep_Location  Dihedral  Twist    Twist_Location  tip airfoil
    1  2.74658   1.25677     1.17156    3.33482   0      0.25            1.4       6.94987  0.25            as above
    2  3.26157   1.17156     1.06733    3.65115   0      0.25            2.275     7.05288  0.25            airfoil file "DAE 21"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 BaseThickChord=0.117884 ThickChord=0.117884
    3  2.91824   1.06733     0.970372   2.97325   0      0.25            3.175     6.66141  0.25            as above
    4  3.08991   0.970372    0.862164   2.83118   0      0.25            4.05      5.83426  0.25            airfoil file "cst_mid2_nsga2_g01_child_0046_9585b968"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 BaseThickChord=0.116647 ThickChord=0.116647
    5  2.05994   0.862164    0.784941   1.69647   0      0.25            4.8       5.23651  0.25            airfoil file "cst_tip_nsga2_g04_child_0123_01770232"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 BaseThickChord=0.118947 ThickChord=0.118947
    6  1.37329   0.784941    0.729402   1.03982   0      0.25            5.3       4.91864  0.25            as above
    7  0.858307  0.729402    0.691495   0.609783  0      0.25            5.625     4.71997  0.25            as above
    8  0.858307  0.691495    0.645004   0.573563  0      0.25            5.875     4.64051  0.25            as above
